k := 2.6
T := 5.5
T1 := 2
T2 := 7.6
T3 := 2.8
c := 0.7
W1(s) := k/(T*s + 1)
W2(s) := k/(T1*T2*s^2 + 2*c*T1*s + 1)
W3(s) := k/s
W4(s) := k/(s*(T*s + 1))
W5(s) := k*(1 + 1/(T3*s))
W6(s) := k*s/(T*s + 1)
1
W1(s) := k/(T*s + 1)
v := [1; T]
polyroots(v) = -0.181818
w1(t) := W1(s) invlaplace, s, float, 3 → 0.473*e^(-0.182*t)
h1(t) := W1(s)/s invlaplace, s, float, 3 → -2.6*e^(-0.182*t) + 2.6
# [plot: w1(t), h1(t) vs t]
v1 := [1; T1*T2]
polyroots(v1) = -0.0657895
w2(t) := W2(s) invlaplace, s, float, 3 → 0.715*e^(-0.0921*t)*sin(0.239*t)
h2(t) := W2(s)/s
